# ЛАБОРАТОРНА РОБОТА №3
# Синтез рекурсивного цифрового фільтра
# Мета: навчитися проводити аналіз та синтез рекурсивного цифрового фільтра
# 7 Варіант
# Вспомогательные функции
# mul(A,B)
# Функция, позволяющая находить произведение многочленов произвольного порядка относительно их коэффициентов.
# Вход: А, В - массивы коэффициентов двух многочленов.
# Замечание: если многочлены содержат нулевые коэффициенты, то эти коэффициенты все равно должны быть включены в массивы!
# Выход: массив коэффициентов многочлена, полученного в результате произведения.
mul(A, B) :=
    for k ∈ 0 .. last(A) + last(B)
        Rez[k] ← 0
    for i ∈ 0 .. last(A)
        for j ∈ 0 .. last(B)
            Rez[i + j] ← Rez[i + j] + A[i]*B[j]
    Rez
# Частотное преобразование
# z_lpf_lpf(f_g,f_a)
# Преобразование прототипа ФНЧ (переменная (z^(*))^-1) в реальный ФНЧ (переменная z^(-i)).
# Вход: f_g, f_a - соответственно граничная частота фильтра и частота Найквиста (частота дискретизации сигнала).
# Выход: двумерный массив, содержащий два столбца: числитель и знаменатель; первый столбец содержит коэффициенты при переменной z^(-i) реального фильтра, начиная с z^0, находящиеся в числителе; второй столбец содержит коэффициенты при переменной z^(-i) реального фильтра, начиная с z^0, находящиеся в знаменателе.
z_lpf_lpf(f_g, f_a) :=
    d ← sin(π*1/4 - π*f_g/f_a)/sin(π*1/4 + π*f_g/f_a)
    numerator[0] ← -d
    numerator[1] ← 1
    denominator[0] ← 1
    denominator[1] ← -d
    Rez[:, 0] ← numerator
    Rez[:, 1] ← denominator
    Rez
# z_lpf_hpf(f_g,f_a)
# Преобразование прототипа ФНЧ (переменная (z^(*))^-1) в реальный ФВЧ (переменная z^(-i)).
# Вход: f_g, f_a - соответственно граничная частота фильтра и частота Найквиста (частота дискретизации сигнала).
# Выход: двумерный массив, содержащий два столбца: числитель и знаменатель; первый столбец содержит коэффициенты при переменной z^(-i) реального фильтра, начиная с z^0, находящиеся в числителе; второй столбец содержит коэффициенты при переменной z^(-i) реального фильтра, начиная с z^0, находящиеся в знаменателе.
z_lpf_hpf(f_g, f_a) :=
    d ← -cos(π*1/4 + π*f_g/f_a)/sin(π*1/4 + π*f_g/f_a)
    numerator[0] ← d
    numerator[1] ← 1
    denominator[0] ← 1
    denominator[1] ← d
    Rez[:, 0] ← -1*numerator
    Rez[:, 1] ← denominator
    Rez
# z_lpf_bpf(f_g_low,f_g_high,f_a)
# Преобразование прототипа ФНЧ (переменная (z^(*))^-1) в реальный ПФ (переменная z^(-i)).
# Вход: f_g_low, f_g_high, f_a - соответственно нижняя граничная частота фильтра, верхняя граничная частота фильтра и частота Найквиста (частота дискретизации сигнала).
# Выход: двумерный массив, содержащий два столбца: числитель и знаменатель; первый столбец содержит коэффициенты при переменной z^(-i) реального фильтра, начиная с z^0, находящиеся в числителе; второй столбец содержит коэффициенты при переменной z^(-i) реального фильтра, начиная с z^0, находящиеся в знаменателе.
z_lpf_bpf(f_g_low, f_g_high, f_a) :=
    d ← cos(π*f_g_high/f_a + π*f_g_low/f_a)/cos(π*f_g_high/f_a - π*f_g_low/f_a)
    k ← cot(π*f_g_high/f_a - π*f_g_low/f_a)*tan(π*1/4)
    numerator[0] ← (k - 1)/(k + 1)
    numerator[1] ← -2*d*k/(k + 1)
    numerator[2] ← 1
    denominator[0] ← 1
    denominator[1] ← -2*d*k/(k + 1)
    denominator[2] ← (k - 1)/(k + 1)
    Rez[:, 0] ← -1*numerator
    Rez[:, 1] ← denominator
    Rez
# z_lpf_rej(f_g_low,f_g_high,f_a)
# Преобразование прототипа ФНЧ (переменная (z^(*))^-1) в реальный ЗФ (заграждающий (режекторный) фильтр) (переменная z^(-i)).
# Вход: f_g_low, f_g_high, f_a - соответственно нижняя граничная частота фильтра, верхняя граничная частота фильтра и частота Найквиста (частота дискретизации сигнала).
# Выход: двумерный массив, содержащий два столбца: числитель и знаменатель; первый столбец содержит коэффициенты при переменной z^(-i) реального фильтра, начиная с z^0, находящиеся в числителе; второй столбец содержит коэффициенты при переменной z^(-i) реального фильтра, начиная с z^0, находящиеся в знаменателе.
z_lpf_rej(f_g_low, f_g_high, f_a) :=
    d ← cos(π*f_g_high/f_a + π*f_g_low/f_a)/cos(π*f_g_high/f_a - π*f_g_low/f_a)
    k ← tan(π*f_g_high/f_a - π*f_g_low/f_a)*tan(π*1/4)
    numerator[0] ← (1 - k)/(1 + k)
    numerator[1] ← -2*d/(1 + k)
    numerator[2] ← 1
    denominator[0] ← 1
    denominator[1] ← -2*d/(1 + k)
    denominator[2] ← (1 - k)/(1 + k)
    Rez[:, 0] ← numerator
    Rez[:, 1] ← denominator
    Rez
# Gz(ω,G,T_a)
# Передаточная функция фильтра, зависящая от w.
# Вход:
# G - двумерный массив коэффициентов передаточной функции реального фильтра; первый столбец содержит коэффициенты при переменной z^(-k) реального фильтра, начиная с z^0, находящиеся в числителе (коэффициенты a_k); второй столбец содержит коэффициенты при переменной z^(-k) реального фильтра, начиная с z^0, находящиеся в знаменателе (коэффициенты b_k, причем b_0=1);
# T_a - временной интервал Найквиста (временной интервал дискретизации сигнала).
# Замечание: функция зависит от аргумента w, поэтому удобна для построения графика передаточной функции.
Gz(ω, G, T_a) :=
    j ← sqrt(-1)
    k ← last(G[:, 0])
    (G[:, 0][0] + sum(G[:, 0][i]*exp(-j*i*ω*T_a), i = 1 .. k))/(G[:, 1][0] + sum(G[:, 1][i]*exp(-j*i*ω*T_a), i = 1 .. k))
# coeff_prot(M)
# Функция, вычисляющая коэффициенты при (z*)^(-k) прототипа передаточной функции.
# Вход: М - двумерный массив коэффициентов прототипа ФНЧ.
# Замечание
# М получается путем сцепления (стандартная функция augment(...)) двумерных массивов коэффициентов частичных фильтров, образующих искомый фильтр. Каждый двумерный массив коэффициентов, участвующий в сцеплении, имеет размерность 3*2. Первый столбец такого массива представляет собой коэффициенты прототипа частичного ФНЧ (1 или 2 порядка) a^(*)_k при (z*)^(-k), начиная с (z*)^0. Второй столбец представляет собой коэффициенты прототипа частичного ФНЧ (1 или 2 порядка) b^(*)_k при (z*)^(-k), начиная с (z*)^0, причем коэффициент b^(*)_0=1 (коэффициент при (z*)^0). Указанные коэффициенты a^(*)_k и b^(*)_k выбираются из таблиц коэффициентов прототипов ФНЧ для каждого прототипа частичного ФНЧ. Из них формируются вышеуказанные массивы 3*2. Затем полученные массивы поочередно сцепляются в массив М.
# Выход: двумерный массив коэффициентов при (z*)^(-k) передаточной функции прототипа искомого фильтра; первый столбец представляет собой коэффициенты при (z*)^(-k) в числителе передаточной функции, начиная с (z*)^0; второй столбец представляет собой коэффициенты при (z*)^(-k) в знаменателе передаточной функции, начиная с (z*)^0.
coeff_prot(M) :=
    k ← cols(M) - 1
    num ← M[:, 0]
    den ← M[:, 1]
    for i ∈ 2 .. k
        num ← mul(num, M[:, i]) if mod(i, 2) == 0
        den ← mul(den, M[:, i]) if mod(i, 2) == 1
    Rez[:, 0] ← num
    Rez[:, 1] ← den
    Rez
# Z_1_d(Z1,k)
# Вспомогательная рекурсивная функция, используемая функцией Z(Z1,k).
Z_1_d(Z1, k) :=
    Rez ← Z1 if k == 1
    if k > 1
        Rez ← mul(Z_1_d(Z1, k/2), Z_1_d(Z1, k/2)) if mod(k, 2) == 0
        Rez ← mul(Z_1_d(Z1, k - 1), Z_1_d(Z1, 1)) if mod(k, 2) == 1
    Rez
# Z(Z1,k)
# Функция, вычисляющая (z^(*))^(-k) на основе (z^(*))^-1
# Вход: Z1 - массив, возвращаемый соответствующим частотным преобразованием для (z^(*))^-^1 (см. выше); k - показатель степени, в которую необходимо возвести (z^(*))^-1.
# Выход: двумерный массив, содержащий два столбца: числитель и знаменатель; первый столбец содержит коэффициенты при переменной z^(-i) реального фильтра, начиная с z^0, находящиеся в числителе; второй столбец содержит коэффициенты при переменной z^(-i) реального фильтра, начиная с z^0, находящиеся в знаменателе.
Z(Z1, k) :=
    Rez[:, 0] ← Z_1_d(Z1[:, 0], k)
    Rez[:, 1] ← Z_1_d(Z1[:, 1], k)
    Rez
# coeff_real(Gp,Z1)
# Функция, вычисляющая коэффициенты при z^(-k) передаточной функции реального фильтра.
# Вход: Gp - массив коэффициентов при (z^(*))^(-k) прототипа передаточной функции, возвращаемый функцией coeff_prot(...); Z1 - массив, возвращаемый соответствующим частотным преобразованием для (z^(*))^-1 (см. выше).
# Выход: двумерный массив коэффициентов при z^(-k) передаточной функции искомого фильтра; первый столбец представляет собой коэффициенты при z^(-k) в числителе передаточной функции, начиная с (z*)^0 (то есть коэффициенты a_k реального фильтра); второй столбец представляет собой коэффициенты при z^(-k) в знаменателе передаточной функции, начиная с (z*)^0 (то есть коэффициенты b_k реального фильтра).
# Замечание: возвращаемые коэффициенты нормированы относительно b_0 (b_0=1).
coeff_real(Gp, Z1) :=
    k ← last(Gp[:, 0])
    Rez[:, 0] ← Gp[:, 0][0]*Z(Z1, k)[:, 1] + sum(Gp[:, 0][i]*mul(Z(Z1, k - i)[:, 1], Z(Z1, i)[:, 0]), i = 1 .. k - 1) + Gp[:, 0][k]*Z(Z1, k)[:, 0]
    Rez[:, 1] ← Gp[:, 1][0]*Z(Z1, k)[:, 1] + sum(Gp[:, 1][i]*mul(Z(Z1, k - i)[:, 1], Z(Z1, i)[:, 0]), i = 1 .. k - 1) + Gp[:, 1][k]*Z(Z1, k)[:, 0]
    Rez[:, 0] ← Rez[:, 0]/Rez[:, 1][0]
    Rez[:, 1] ← Rez[:, 1]/Rez[:, 1][0]
    Rez
________________________________________________________________________________________
# Исходный сигнал
x(t) := cos(5*t) + 20*cos(10*t) + 10*cos(20*t) + cos(25*t)
j := sqrt(-1)
# Временной интервал ожидания аналогового сигнала:
T := 4*π
# Нормирование временного интервала ожидания сигнала:
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# Шаг:
dt := 0.001
t := 0, dt .. T
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# Побудова ФНЧ Кауера 4-го порядка
# Коэффициенты частичных фильтров (табличные данные):
# 1 частичный фильтр: | 2 частичный фильтр:
f1 := [0.1851, 1; 0.2397, -0.5678; 0.1851, 0.1778]
f2 := [0.4347, 1; 0.8693, -0.0215; 0.4347, 0.7602]
# Установки частот:
# Граничные частоты:
f_a := 20/(2*π)
f_g := 15/(2*π)
f_g1 := 20/(2*π)
f_g = 2.38732
T_a := 1/f_a
ω_a := 2*π/T_a
T_a = 0.314159
f_a = 3.1831
ω_a = 20
# Получение сцепления массивов коэффициентов:
M := augment(f1, f2)
M = [0.1851, 1, 0.4347, 1; 0.2397, -0.5678, 0.8693, -0.0215; 0.1851, 0.1778, 0.4347, 0.7602]
# Расчет коэффициентов передаточной функции прототипа:
Gp := coeff_prot(M)
# Числитель:
transpose(Gp[:, 0]) = [0.080463, 0.265105, 0.369297, 0.265105, 0.080463]
# Знаменатель:
transpose(Gp[:, 1]) = [1, -0.5893, 0.950208, -0.435464, 0.135164]
# Частотное преобразование:
z_1 := z_lpf_lpf(f_g, f_a)
# Расчет коэффициентов передаточной функции реального фильтра:
Gr := coeff_real(Gp, z_1)
# Числитель:
transpose(Gr[:, 0]) = [0.595301, 1.96136, 2.73222, 1.96136, 0.595301]
# Знаменатель:
transpose(Gr[:, 1]) = [1, -3.22176, 7.03006, -4.3599, 7.39844]
ω := 0, 0.01 .. ω_a/2
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# Построение рекурсивного фильтра
# Порядок фильтра:
N := last(Gr[:, 0])
K := ceil(T/T_a)
n := 0 .. N - 1
y[n] := 0
n := N .. K
y[n] := sum(Gr[:, 0][i]*x(T_a*(n - i)), i = 0 .. N) - sum(Gr[:, 1][i]*y[n - i], i = 1 .. N)
# Восстановление фильтрованного сигнала из дискретной последовательности (ряд Котельникова):
F_S(t) := sum(y[n]*sin(ω_a/2*(t - n*T_a))/(ω_a/2*(t - n*T_a)), n = 0 .. K)
# Интервал запаздывания фильтра:
mov := N*T_a
mov = 1.25664
# Идеальный фильтрованный сигнал:
high(t) := cos(5*t)
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